// COMSOL Multiphysics 6.2.0.415 model "Coil Around Boc Lab 2.mph"
// Outline of the model tree

Geometry
  geom1 "Geometry 1" (2D, length unit cm)
    sq1: Square | base = center
    sq2: Square | base = center; size = 0.8
    dif1: Difference | input = sq1; input2 = sq2
    pt1: Point (disabled) | p = {0.5, 0.5}
    pt2: Point (disabled) | p = {-0.5, -0.5}
    pt3: Point (disabled) | p = {0.5, -0.5}
    pt4: Point (disabled) | p = {-0.5, 0.5}
    ls1: LineSegment (disabled) | vertex1 = pt1(1) points 1; vertex2 = pt3(1) points 1
    ls2: LineSegment (disabled) | vertex1 = pt4(1) points 1; vertex2 = ls1(1) points 1
    ls3: LineSegment (disabled) | vertex1 = ls2(1) points 1; vertex2 = pt2(1) points 1
    ls4: LineSegment (disabled) | vertex1 = ls3(1) points 2; vertex2 = ls1(1) points 2
    pt5: Point (disabled) | p = {0.3, 0.3}
    pt6: Point (disabled) | p = {-0.3, -0.3}
    pt7: Point (disabled) | p = {0.3, -0.3}
    pt8: Point (disabled) | p = {-0.3, 0.3}
    ls5: LineSegment (disabled) | vertex1 = pt8(1) points 1; vertex2 = pt6(1) points 1
    ls6: LineSegment (disabled) | vertex1 = ls5(1) points 1; vertex2 = pt5(1) points 1
    ls7: LineSegment (disabled) | vertex1 = ls6(1) points 2; vertex2 = pt7(1) points 1
    ls8: LineSegment (disabled) | vertex1 = ls5(1) points 2; vertex2 = ls7(1) points 2
    csol1: ConvertToSolid (disabled) | input = ls1, ls2, ls3, ls4
    csol2: ConvertToSolid (disabled) | input = ls5, ls6, ls7, ls8
    dif2: Difference (disabled) | input = csol1; input2 = csol2
    sq3: Square (disabled) | base = center
    r1: Rectangle | pos = {-0.38, 0}; base = center; size = {0.01, 0.5}
    r2: Rectangle | pos = {-0.52, 0}; base = center; size = {0.01, 0.5}
    sq4: Square | base = center; size = 2
    ls9: LineSegment | vertex1 = dif1(1) points 8; vertex2 = dif1(1) points 1
    fin: Finalize "Form Union"

Materials
  mat1: Common "Soft Iron (Without Losses)" on domains 3, 4
    def "Basic"
      electricconductivity = 0[S/m]
      relpermittivity = 1
      relpermeability = 1000
    BHCurve
      normB = BH(normHin)
      normH = BH_inv(normBin)
      Wpm = BH_prim(normHin)
      normHin = sqrt(H1^2+H2^2+H3^2+eps)
      DESCR_PREFIX:normHin = Magnetic field norm
      normBin = sqrt(B1^2+B2^2+B3^2+eps)
      DESCR_PREFIX:normBin = Magnetic flux density norm
      BH: Interpolation
        table = 
          {0, 0}
          {663.146, 1}
          {1067.5, 1.1}
          {1705.23, 1.2}
          {2463.11, 1.3}
          {3841.67, 1.4}
          {5425.74, 1.5}
          {7957.75, 1.6}
          {12298.3, 1.7}
          {20462.8, 1.8}
          {32169.6, 1.9}
          {61213.4, 2}
          {111408, 2.1}
          {188487.757, 2.2}
          {267930.364, 2.3}
          {347507.836, 2.4}
        extrap = linear
        fununit = T
        argunit = A/m
        defineinv = on
        defineprimfun = on
    EffectiveBHCurve
      normBeff = BHeff(normHeffin)
      normHeff = BHeff_inv(normBeffin)
      normHeffin = sqrt(realdot(H1,H1)+realdot(H2,H2)+realdot(H3,H3)+eps)
      DESCR_PREFIX:normHeffin = Effective magnetic field norm
      normBeffin = sqrt(realdot(B1,B1)+realdot(B2,B2)+realdot(B3,B3)+eps)
      DESCR_PREFIX:normBeffin = Effective magnetic flux density norm
      BHeff: Interpolation
        table = 
          {0, 0}
          {663.146, 1.00000005169}
          {1067.5, 1.49364951241}
          {1705.23, 1.94153284613}
          {2463.11, 2.25776566937}
          {3841.67, 2.60998064243}
          {5425.74, 2.86644520908}
          {7957.75, 3.14414380972}
          {12298.3, 3.44853805165}
          {20462.8, 3.78167119737}
          {32169.6, 4.05834559011}
          {61213.4, 4.42064655295}
          {111408, 4.72127408955}
          {188487.757, 4.97214814072}
          {267930.364, 5.14551086086}
          {347507.836, 5.24551086143}
        extrap = linear
        fununit = T
        argunit = A/m
        defineinv = on
  mat2: Common "Air" on domains 1, 2, 5-7
    def "Basic"
      thermalexpansioncoefficient = alpha_p(pA,T)
      molarmass = 0.02897[kg/mol]
      bulkviscosity = muB(T)
      relpermeability = 1
      relpermittivity = 1
      dynamicviscosity = eta(T)
      ratioofspecificheat = 1.4
      electricconductivity = 0[S/m]
      heatcapacity = Cp(T)
      density = rho(pA,T)
      thermalconductivity = k(T)
      soundspeed = cs(T)
      eta: Piecewise | arg = T; pieces = {200.0, 1600.0, -8.38278E-7+8.35717342E-8*T^1-7.69429583E-11*T^2+4.6437266E-14*T^3-1.06585607E-17*T^4}; argunit = K; fununit = Pa*s
      Cp: Piecewise | arg = T; pieces = {200.0, 1600.0, 1047.63657-0.372589265*T^1+9.45304214E-4*T^2-6.02409443E-7*T^3+1.2858961E-10*T^4}; argunit = K; fununit = J/(kg*K)
      rho: Analytic | expr = pA*0.02897/R_const[K*mol/J]/T; args = {pA, T}; fununit = kg/m^3; argunit = {Pa, K}
      k: Piecewise | arg = T; pieces = {200.0, 1600.0, -0.00227583562+1.15480022E-4*T^1-7.90252856E-8*T^2+4.11702505E-11*T^3-7.43864331E-15*T^4}; argunit = K; fununit = W/(m*K)
      cs: Analytic | expr = sqrt(1.4*R_const[K*mol/J]/0.02897*T); args = T; fununit = m/s; argunit = K
      an1: Analytic | funcname = alpha_p; expr = -1/rho(pA,T)*d(rho(pA,T),T); args = {pA, T}; fununit = 1/K; argunit = {Pa, K}
      an2: Analytic "Analytic 2a" | funcname = muB; expr = 0.6*eta(T); args = T; fununit = Pa*s; argunit = K
    RefractiveIndex
      n = 1
      ki = 0
    NonlinearModel
      BA = def.gamma-1
    idealGas
      Rs = R_const/Mn
      heatcapacity = Cp(T)
      ratioofspecificheat = 1.4
      molarmass = 0.02897[kg/mol]
      Cp: Piecewise | arg = T; pieces = {200.0, 1600.0, 1047.63657-0.372589265*T^1+9.45304214E-4*T^2-6.02409443E-7*T^3+1.2858961E-10*T^4}; argunit = K; fununit = J/(kg*K)

Physics
  mf: InductionCurrents "Magnetic Fields" on domains 2-7
    dependent variable A = {Ax, Ay, Az}
    fsp1: FreeSpace (default)
    mi1: MagneticInsulation (default)
    init1: init "Initial Values 1" (default)
    als1: AmperesLawSolid "Ampère's Law in Solids 1" on domains 3, 4 | ConstitutiveRelationBH = BHCurve
    coil1: Coil on domains 7 | ConductorModel = Multi; N = 100
    coil2: Coil on domains 2 | ConductorModel = Multi; ICoil = -1[A]; N = 100

Mesh
  mesh1 "Mesh 1"
    size: MeshSizeDefault | hmax = 0.134; hmin = 6.0E-4; hcurve = 0.3; hgrad = 1.3
    ftri2: FreeTri "Free Triangular 2" on remaining entities
      size1: Size on domains 3, 4 | hauto = 2
    ftri3: FreeTri "Free Triangular 3" on remaining entities

Studies
  std1 "Study 1"
    stat: Stationary

Solver configurations
  sol1 "Solution 1" (study std1)
    v1: Variables "Dependent Variables 1"
    s1: Stationary "Stationary Solver 1"
      dDef: Direct
      fc1: FullyCoupled | linsolver = dDef; maxiter = 100; jtech = once

Datasets
  dset1: Solution | solution = sol1

Plots
  pg1: PlotGroup2D "Magnetic Flux Density Norm (mf)" | data = dset1
    surf1: Surface | expr = mf.normB
    str1: Streamline on boundaries 1-8, 10-13, 15-20, 22, 23 | expr = {mf.Bx, mf.By}; udist = 0.03
      col1: Color "Color Expression 1" | expr = mf.normB
      filt1: Filter | expr = !isScalingSystemDomain
    con1: Contour | expr = mf.Az; levelrounding = off
      filt1: Filter | expr = !isScalingSystemDomain
  pg2: PlotGroup1D "1D Plot Group 2" | data = dset1
    lngr1: LineGraph on boundaries 9, 14, 21 | expr = mf.normB