// COMSOL Multiphysics 6.2.0.415 model "Lab 2_Capacitance.mph"
// Outline of the model tree

Selections
  sel1: Explicit "Metal" on domains 2, 4-6
  com1: Complement "Insluators" | entitydim = 3; input = {sel1}
  sel2: Explicit "Ground" on boundaries adjacent to domains 2, 5
  sel3: Explicit "Terminal" on boundaries adjacent to domains 4, 6

Geometry
  geom1 "Geometry 1" (3D, length unit cm)
    cyl1: Cylinder | r = 20; h = 20
    cyl2: Cylinder
      pos = {0, 0, 8}
      layername = Layer 1
      layer = 5 [mm]
      layerside = off
      layerbottom = on
      layertop = on
      r = 10
      h = 4
    cyl3: Cylinder | r = 0.75; h = 8
    cyl4: Cylinder | pos = {0, 0, 12}; r = 0.75; h = 8
    fin: Finalize "Form Union"

Materials
  mat1: Common "Air" on all domains
    def "Basic"
      thermalexpansioncoefficient = alpha_p(pA,T)
      molarmass = 0.02897[kg/mol]
      bulkviscosity = muB(T)
      relpermeability = 1
      relpermittivity = 1
      dynamicviscosity = eta(T)
      ratioofspecificheat = 1.4
      electricconductivity = 0[S/m]
      heatcapacity = Cp(T)
      density = rho(pA,T)
      thermalconductivity = k(T)
      soundspeed = cs(T)
      eta: Piecewise | arg = T; pieces = {200.0, 1600.0, -8.38278E-7+8.35717342E-8*T^1-7.69429583E-11*T^2+4.6437266E-14*T^3-1.06585607E-17*T^4}; argunit = K; fununit = Pa*s
      Cp: Piecewise | arg = T; pieces = {200.0, 1600.0, 1047.63657-0.372589265*T^1+9.45304214E-4*T^2-6.02409443E-7*T^3+1.2858961E-10*T^4}; argunit = K; fununit = J/(kg*K)
      rho: Analytic | expr = pA*0.02897/R_const[K*mol/J]/T; args = {pA, T}; fununit = kg/m^3; argunit = {Pa, K}
      k: Piecewise | arg = T; pieces = {200.0, 1600.0, -0.00227583562+1.15480022E-4*T^1-7.90252856E-8*T^2+4.11702505E-11*T^3-7.43864331E-15*T^4}; argunit = K; fununit = W/(m*K)
      cs: Analytic | expr = sqrt(1.4*R_const[K*mol/J]/0.02897*T); args = T; fununit = m/s; argunit = K
      an1: Analytic | funcname = alpha_p; expr = -1/rho(pA,T)*d(rho(pA,T),T); args = {pA, T}; fununit = 1/K; argunit = {Pa, K}
      an2: Analytic "Analytic 2a" | funcname = muB; expr = 0.6*eta(T); args = T; fununit = Pa*s; argunit = K
    RefractiveIndex
      n = 1
      ki = 0
    NonlinearModel
      BA = def.gamma-1
    idealGas
      Rs = R_const/Mn
      heatcapacity = Cp(T)
      ratioofspecificheat = 1.4
      molarmass = 0.02897[kg/mol]
      Cp: Piecewise | arg = T; pieces = {200.0, 1600.0, 1047.63657-0.372589265*T^1+9.45304214E-4*T^2-6.02409443E-7*T^3+1.2858961E-10*T^4}; argunit = K; fununit = J/(kg*K)
  mat2: Common "Glass (quartz)" on domains 3
    def "Basic"
      relpermeability = 1
      electricconductivity = 1e-14[S/m]
      relpermittivity = 4.2
      density = 2210[kg/m^3]
      thermalconductivity = 1.4[W/(m*K)]
      heatcapacity = 730[J/(kg*K)]
    RefractiveIndex
      n = 1.5
      ki = 0

Physics
  es: Electrostatics on selection com1
    dependent variable V
    ccn1: ChargeConservation (default)
    zc1: ZeroCharge (default)
    init1: init "Initial Values 1" (default)
    gnd1: Ground on selection sel2
    term1: Terminal on selection sel3 | TerminalType = Voltage

Mesh
  mesh1 "Mesh 1" (physics-controlled)

Studies
  std1 "Study 1"
    stat: Stationary

Solver configurations
  sol1 "Solution 1" (study std1)
    v1: Variables "Dependent Variables 1"
    s1: Stationary "Stationary Solver 1"
      fc1: FullyCoupled | linsolver = i1
      i1: Iterative | linsolver = cg
        mg1: Multigrid | prefun = amg; coarseningmethod = classic

Datasets
  dset1: Solution | solution = sol1
  dset2: Solution on selection sel1 | solution = sol1
  cpl1: CutPlane | data = dset1

Derived values
  gev1: EvalGlobal "Global Evaluation 1"
    data = dset1
    table = tbl1
    expr = es.C11
    unit = F
    descr = Maxwell capacitance

Tables
  tbl1: Table
    // Global Evaluation 1
    Maxwell capacitance (F) | Maxwell capacitance (F)
    4.34526e-11 | 4.34526e-11

Plots
  pg1: PlotGroup3D "3D Plot Group 1" | data = dset1
    surf1: Surface | data = dset2; expr = V
    slc1: Slice | expr = es.normE; descr = Electric field norm; quickxnumber = 1
    arwv1: ArrowVolume | expr = {es.Ex, es.Ey, es.Ez}; xnumber = 1; ynumber = 24; znumber = 11; arrowlength = logarithmic
      col1: Color "Color Expression 1" | expr = V
  pg2: PlotGroup2D "2D Plot Group 2" | data = cpl1
    con1: Contour | expr = V; levelmethod = levels; levels = range(0.1,0.1,0.9); contourtype = filled
    con2: Contour | expr = V; levelmethod = levels; levels = range(0,0.1,1); contourlabels = on