// COMSOL Multiphysics 6.2.0.415 model "Lab 3_ 2D Capacitor Part 2.mph"
// Outline of the model tree

Geometry
  geom1 "Geometry 1" (2D, length unit cm)
    sq1: Square "Terminal" (disabled) | pos = {0, 70}; base = center; size = 100
    sq2: Square "Dielectric" (disabled) | base = center; size = 40
    sq3: Square "Ground" (disabled) | pos = {0, -70}; base = center; size = 100
    sq4: Square | base = center; size = 120
    r1: Rectangle "Terminal 1" | pos = {0, 25}; base = center; size = {100, 10}
    r2: Rectangle "Ground 1" | pos = {0, -25}; base = center; size = {100, 10}
    r3: Rectangle "Dielectric 1" | base = center; layername = {Layer 1, Layer 2}; layer = {40/3, 40/3}; size = {100, 40}
    pt1: Point (disabled)
    pt2: Point (disabled)
    ls1: LineSegment (disabled) | vertex1 = r3(1) points 4; vertex2 = r3(1) points 5
    pt3: Point | p = {0, 20}
    pt4: Point | p = {0, -20}
    ls2: LineSegment | vertex1 = pt3(1) points 1; vertex2 = pt4(1) points 1
    fin: Finalize "Form Union"

Materials
  mat1: Common "Air" on domains 1, 2, 6
    def "Basic"
      thermalexpansioncoefficient = alpha_p(pA,T)
      molarmass = 0.02897[kg/mol]
      bulkviscosity = muB(T)
      relpermeability = 1
      relpermittivity = 1
      dynamicviscosity = eta(T)
      ratioofspecificheat = 1.4
      electricconductivity = 0[S/m]
      heatcapacity = Cp(T)
      density = rho(pA,T)
      thermalconductivity = k(T)
      soundspeed = cs(T)
      eta: Piecewise | arg = T; pieces = {200.0, 1600.0, -8.38278E-7+8.35717342E-8*T^1-7.69429583E-11*T^2+4.6437266E-14*T^3-1.06585607E-17*T^4}; argunit = K; fununit = Pa*s
      Cp: Piecewise | arg = T; pieces = {200.0, 1600.0, 1047.63657-0.372589265*T^1+9.45304214E-4*T^2-6.02409443E-7*T^3+1.2858961E-10*T^4}; argunit = K; fununit = J/(kg*K)
      rho: Analytic | expr = pA*0.02897/R_const[K*mol/J]/T; args = {pA, T}; fununit = kg/m^3; argunit = {Pa, K}
      k: Piecewise | arg = T; pieces = {200.0, 1600.0, -0.00227583562+1.15480022E-4*T^1-7.90252856E-8*T^2+4.11702505E-11*T^3-7.43864331E-15*T^4}; argunit = K; fununit = W/(m*K)
      cs: Analytic | expr = sqrt(1.4*R_const[K*mol/J]/0.02897*T); args = T; fununit = m/s; argunit = K
      an1: Analytic | funcname = alpha_p; expr = -1/rho(pA,T)*d(rho(pA,T),T); args = {pA, T}; fununit = 1/K; argunit = {Pa, K}
      an2: Analytic "Analytic 2a" | funcname = muB; expr = 0.6*eta(T); args = T; fununit = Pa*s; argunit = K
    RefractiveIndex
      n = 1
      ki = 0
    NonlinearModel
      BA = def.gamma-1
    idealGas
      Rs = R_const/Mn
      heatcapacity = Cp(T)
      ratioofspecificheat = 1.4
      molarmass = 0.02897[kg/mol]
      Cp: Piecewise | arg = T; pieces = {200.0, 1600.0, 1047.63657-0.372589265*T^1+9.45304214E-4*T^2-6.02409443E-7*T^3+1.2858961E-10*T^4}; argunit = K; fununit = J/(kg*K)
  mat2: Common "Glass (quartz)" on domains 3-5, 7-9
    def "Basic"
      relpermeability = 1
      electricconductivity = 1e-14[S/m]
      relpermittivity = 4
      density = 2210[kg/m^3]
      thermalconductivity = 1.4[W/(m*K)]
      heatcapacity = 730[J/(kg*K)]
    RefractiveIndex
      n = 1.5
      ki = 0
  mat3: Common "Glass (quartz) 1" on domains 4, 5, 8, 9
    def "Basic"
      relpermeability = 1
      electricconductivity = 1e-14[S/m]
      relpermittivity = 3
      density = 2210[kg/m^3]
      thermalconductivity = 1.4[W/(m*K)]
      heatcapacity = 730[J/(kg*K)]
    RefractiveIndex
      n = 1.5
      ki = 0
  mat4: Common "Glass (quartz) 2" on domains 5, 9
    def "Basic"
      relpermeability = 1
      electricconductivity = 1e-14[S/m]
      relpermittivity = 2
      density = 2210[kg/m^3]
      thermalconductivity = 1.4[W/(m*K)]
      heatcapacity = 730[J/(kg*K)]
    RefractiveIndex
      n = 1.5
      ki = 0

Physics
  es: Electrostatics on all domains
    dependent variable V
    ccn1: ChargeConservation (default)
    zc1: ZeroCharge (default)
    init1: init "Initial Values 1" (default)
    term1: DomainTerminal "Terminal" on domains 6 | TerminalType = Voltage
    term2: DomainTerminal "Ground" on domains 2 | TerminalType = Voltage; V0 = 0

Mesh
  mesh1 "Mesh 1"
    size: MeshSizeDefault | hmax = 8.04; hmin = 0.036; hcurve = 0.3; hgrad = 1.3
    ftri1: FreeTri "Free Triangular 1" on domains 1, 2, 6
    ftri2: FreeTri "Free Triangular 2" on domains 3-5, 7-9

Studies
  std1 "Study 1"
    stat: Stationary

Solver configurations
  sol1 "Solution 1" (study std1)
    v1: Variables "Dependent Variables 1"
    s1: Stationary "Stationary Solver 1"
      dDef: Direct
      fc1: FullyCoupled | linsolver = dDef

Datasets
  dset1: Solution | solution = sol1

Derived values
  gev1: EvalGlobal "Global Evaluation 1"
    data = dset1
    table = tbl2
    expr = {es.intWe, es.C11}
    unit = {J, F}
    descr = {Total electric energy, "Maxwell capacitance, 11-component"}

Tables
  tbl2: Table
    // Global Evaluation 1
    Total electric energy (J) | Maxwell capacitance, 11-component (F)
    3.26369e-11 | 6.52739e-11
  tbl3: Table
    // Global Evaluation 2
    Total electric energy (J)
    4.83926e-11

Plots
  pg1: PlotGroup2D "Electric Potential (es)" | data = dset1
    surf1: Surface | expr = V
    str1: Streamline on boundaries 1-8, 10, 12-14, 16, 21-27 | expr = {es.Ex, es.Ey}; udist = 0.02
      col1: Color "Color Expression 1" | expr = V
      filt1: Filter | expr = !isScalingSystemDomain
  pg2: PlotGroup2D "Electric Field Norm (es)" | data = dset1
    surf1: Surface | expr = es.normE
    str1: Streamline on boundaries 1-8, 10, 12-14, 16, 21-27 | expr = {es.Ex, es.Ey}; udist = 0.02
      col1: Color "Color Expression 1" | expr = es.normE
      filt1: Filter | expr = !isScalingSystemDomain
  pg3: PlotGroup2D "Electric Potential (es) 1" | data = dset1
    surf1: Surface | expr = V
    str1: Streamline on boundaries 1-8, 10, 12-14, 16, 21-27 | expr = {es.Ex, es.Ey}; udist = 0.02; pointtype = arrow
      col1: Color "Color Expression 1" | expr = V
      filt1: Filter | expr = !isScalingSystemDomain
  pg5: PlotGroup1D "1D Plot Group 5" | data = dset1
    lngr1: LineGraph on boundaries 15, 17, 19 | expr = es.normE; descr = Electric field norm