// COMSOL Multiphysics 6.2.0.415 model "Lab 5_HW 3 Question.mph"
// Outline of the model tree

Geometry
  geom1 "Geometry 1" (3D, length unit cm)
    blk1: Block | size = {10, 100, 10}
    blk2: Block | pos = {10, 0, 4}; size = {5, 100, 2}
    blk3: Block | pos = {15, 0, -5}; size = {20, 100, 20}
    fin: Finalize "Form Union"

Materials
  mat1: Common "Gold" on all domains
    def "Basic"
      relpermeability = 1
      electricconductivity = 4.11e7[S/m]
      thermalexpansioncoefficient = 17e-6[1/K]
      heatcapacity = 385[J/(kg*K)]
      relpermittivity = 1
      density = 8960[kg/m^3]
      thermalconductivity = 400[W/(m*K)]
    Enu "Young's modulus and Poisson's ratio"
      E = 110[GPa]
      nu = 0.35
    linzRes "Linearized resistivity"
      rho0 = 1.72e-8[ohm*m]
      alpha = 0.0039[1/K]
      Tref = 298[K]

Physics
  ec: ConductiveMedia "Electric Currents" on all domains
    dependent variable V2
    cucn1: CurrentConservation (default)
    ein1: ElectricInsulation (default)
    init1: init "Initial Values 1" (default)
    term1: Terminal on boundaries 2, 8, 14 | I0 = 1
    gnd1: Ground on boundaries 5, 12, 19

Mesh
  mesh1 "Mesh 1"
    size: MeshSizeDefault | hauto = 2
    ftet1: FreeTet "Free Tetrahedral 1" on remaining entities

Studies
  std1 "Study 1"
    stat: Stationary

Solver configurations
  sol1 "Solution 1" (study std1)
    v1: Variables "Dependent Variables 1"
    s1: Stationary "Stationary Solver 1"
      fc1: FullyCoupled | linsolver = i1
      i1: Iterative | linsolver = cg
        mg1: Multigrid | prefun = amg; coarseningmethod = classic

Datasets
  dset1: Solution | solution = sol1
  surf1: Surface on boundaries 2, 8, 14 | data = dset1
  surf2: Surface on boundaries 5, 12, 19 | data = dset1
  cpl1: CutPlane
    data = dset1
    planetype = general
    genpoints = {{17.5, 50, 5}, {18.4688, 50.2481, 5}, {17.4566, 50.17, 5.98442}}

Derived values
  gev1: EvalGlobal "Global Evaluation 1" | data = dset1; table = tbl1; expr = ec.R11; unit = Ω; descr = Resistance

Tables
  tbl1: Table
    // Global Evaluation 1
    Resistance (Ω)
    4.77076e-07

Plots
  pg1: PlotGroup3D "Electric Potential (es)" (disabled) | data = dset1
    mslc1: Multislice
      expr = V
      multiplanexmethod = coord
      xcoord = es.CPx
      multiplaneymethod = coord
      ycoord = es.CPy
      multiplanezmethod = coord
      zcoord = es.CPz
    strmsl1: StreamlineMultislice
      expr = {es.Ex, es.Ey, es.Ez}
      multiplanexmethod = coord
      xcoord = es.CPx
      multiplaneymethod = coord
      ycoord = es.CPy
      multiplanezmethod = coord
      zcoord = es.CPz
      udist = 0.02
      col1: Color "Color Expression 1" | expr = V
      filt1: Filter | expr = !isScalingSystemDomain
  pg2: PlotGroup3D "Electric Field Norm (es)" (disabled) | data = dset1
    mslc1: Multislice
      expr = es.normE
      multiplanexmethod = coord
      xcoord = es.CPx
      multiplaneymethod = coord
      ycoord = es.CPy
      multiplanezmethod = coord
      zcoord = es.CPz
    strmsl1: StreamlineMultislice
      expr = {es.Ex, es.Ey, es.Ez}
      multiplanexmethod = coord
      xcoord = es.CPx
      multiplaneymethod = coord
      ycoord = es.CPy
      multiplanezmethod = coord
      zcoord = es.CPz
      udist = 0.02
      col1: Color "Color Expression 1" | expr = es.normE
      filt1: Filter | expr = !isScalingSystemDomain
  pg3: PlotGroup3D "Electric Potential (ec)" | data = dset1
    vol1: Volume | expr = V2
  pg4: PlotGroup3D "Electric Field Norm (ec)" | data = dset1
    mslc1: Multislice
      expr = ec.normE
      multiplanexmethod = coord
      xcoord = ec.CPx
      multiplaneymethod = coord
      ycoord = ec.CPy
      multiplanezmethod = coord
      zcoord = ec.CPz
    strmsl1: StreamlineMultislice
      expr = {ec.Ex, ec.Ey, ec.Ez}
      multiplanexmethod = coord
      xcoord = ec.CPx
      multiplaneymethod = coord
      ycoord = ec.CPy
      multiplanezmethod = coord
      zcoord = ec.CPz
      udist = 0.02
      col1: Color "Color Expression 1" | expr = ec.normE
      filt1: Filter | expr = !isScalingSystemDomain
  pg5: PlotGroup3D "3D Plot Group 5" | data = dset1
    slc1: Slice
      expr = ec.normJ
      descr = Current density norm
      quickplane = zx
      quickznumber = 1
      quickxnumber = 1
      quickynumber = 1
  pg6: PlotGroup2D "2D Plot Group 6"
    surf1: Surface | data = surf1; expr = ec.normJ; descr = Current density norm
    surf2: Surface (disabled)
      data = surf2
      cutplane = cpl1
      planefirst = {29.7094850853, 2.31696550689, 13.7895787999}
      planesecond = {5.29051491468, 97.6830344931, -3.78957879992}
      planeisinit = on
      expr = comp1.ec.Jx
      descr = Current density, x-component
  pg7: PlotGroup2D "2D Plot Group 7"
    surf1: Surface (disabled) | data = surf1; expr = ec.Jx; descr = Current density, x-component
    surf2: Surface
      data = surf2
      cutplane = cpl1
      planefirst = {29.7094850853, 2.31696550689, 13.7895787999}
      planesecond = {5.29051491468, 97.6830344931, -3.78957879992}
      planeisinit = on
      expr = ec.normJ
      descr = Current density norm
    surf3: Surface (disabled) | data = surf2; expr = comp1.V2

Exports
  data1: Data
    data = dset1
    expr = ec.normJ
    unit = A/m^2
    descr = Current density norm
    exporttype = vtu
    filename = C:\Users\Doria\Documents\COMSOL\Untitled.vtu
  data2: Data
    data = dset1
    expr = ec.normJ
    unit = A/m^2
    descr = Current density norm
    filename = C:\Users\Doria\Documents\COMSOL\Lab 5_HW 3 Question Data.csv