// COMSOL Multiphysics 6.2.0.415 model "Lab 5_Resistance_Pt_2.mph"
// Outline of the model tree

Geometry
  geom1 "Geometry 1" (3D, length unit mm)
    cyl1: Cylinder | r = 0.5; h = 10
    fin: Finalize "Form Union"

Materials
  mat1: Common "Copper" on all domains
    def "Basic"
      relpermeability = 1
      electricconductivity = 5.998e7[S/m]
      thermalexpansioncoefficient = 17e-6[1/K]
      heatcapacity = 385[J/(kg*K)]
      relpermittivity = 1
      density = 8960[kg/m^3]
      thermalconductivity = 400[W/(m*K)]
    Enu "Young's modulus and Poisson's ratio"
      E = 110[GPa]
      nu = 0.35
    linzRes "Linearized resistivity"
      rho0 = 1.72e-8[ohm*m]
      alpha = 0.0039[1/K]
      Tref = 298[K]

Physics
  ec: ConductiveMedia "Electric Currents" on all domains
    dependent variable V
    cucn1: CurrentConservation (default)
    ein1: ElectricInsulation (default)
    init1: init "Initial Values 1" (default)
    gnd1: Ground on boundaries 3
    term1: Terminal on boundaries 4 | I0 = 5

Mesh
  mesh1 "Mesh 1"
    size: MeshSizeDefault | hauto = 1
    ftet1: FreeTet "Free Tetrahedral 1" on remaining entities

Studies
  std1 "Study 1"
    stat: Stationary

Solver configurations
  sol1 "Solution 1" (study std1)
    v1: Variables "Dependent Variables 1"
    s1: Stationary "Stationary Solver 1"
      fc1: FullyCoupled | linsolver = i1
      i1: Iterative | linsolver = cg
        mg1: Multigrid | prefun = amg; coarseningmethod = classic

Datasets
  dset1: Solution | solution = sol1

Derived values
  gev1: EvalGlobal "Global Evaluation 1" | data = dset1; table = tbl1; expr = ec.R11; unit = mΩ; descr = Resistance

Tables
  tbl1: Table
    // Global Evaluation 1
    Resistance (mΩ) | Resistance (mΩ) | Resistance (mΩ) | Resistance (mΩ)
    0.21228 | 0.212291 | 0.212278 | 0.212278

Plots
  pg1: PlotGroup3D "Electric Potential (ec)" | data = dset1
    vol1: Volume | expr = V
  pg2: PlotGroup3D "Electric Field Norm (ec)" | data = dset1
    mslc1: Multislice
      expr = ec.normE
      multiplanexmethod = coord
      xcoord = ec.CPx
      multiplaneymethod = coord
      ycoord = ec.CPy
      multiplanezmethod = coord
      zcoord = ec.CPz
    strmsl1: StreamlineMultislice
      expr = {ec.Ex, ec.Ey, ec.Ez}
      multiplanexmethod = coord
      xcoord = ec.CPx
      multiplaneymethod = coord
      ycoord = ec.CPy
      multiplanezmethod = coord
      zcoord = ec.CPz
      udist = 0.02
      col1: Color "Color Expression 1" | expr = ec.normE
      filt1: Filter | expr = !isScalingSystemDomain