// COMSOL Multiphysics 6.2.0.415 model "Lab 8_Solenoid Magnetic Field.mph"
// Outline of the model tree

Geometry
  geom1 "Geometry 1" (2D, length unit m)
    r1: Rectangle | pos = {0.2, 0.1}; base = center; size = {0.75, 0.75}
    c1: Circle | r = 0.01
    c2: Circle | pos = {0.02, 0}; r = 0.01
    c3: Circle | pos = {0.04, 0}; r = 0.01
    c4: Circle | pos = {0.06, 0}; r = 0.01
    c5: Circle | pos = {0.08, 0}; r = 0.01
    c6: Circle | pos = {0.1, 0}; r = 0.01
    c7: Circle | pos = {0.12, 0}; r = 0.01
    c8: Circle | pos = {0.14, 0}; r = 0.01
    c9: Circle | pos = {0.16, 0}; r = 0.01
    c10: Circle | pos = {0.18, 0}; r = 0.01
    c11: Circle | pos = {0.2, 0}; r = 0.01
    c12: Circle | pos = {0.22, 0}; r = 0.01
    c13: Circle | pos = {0.24, 0}; r = 0.01
    c14: Circle | pos = {0.26, 0}; r = 0.01
    c15: Circle | pos = {0.28, 0}; r = 0.01
    c16: Circle | pos = {0.30, 0}; r = 0.01
    c17: Circle | pos = {0.32, 0}; r = 0.01
    c18: Circle | pos = {0.34, 0}; r = 0.01
    c19: Circle | pos = {0.36, 0}; r = 0.01
    c20: Circle | pos = {0.38, 0}; r = 0.01
    mir1: Mirror
      input = c1, c10, c11, c12, c13, c14, c15, c16, c17, c18, c19, c2, c20, c3, c4, c5, c6, c7, c8, c9
      keep = on
      pos = {0, 0.10}
      axis = {0, 1}
    ls1: LineSegment | specify1 = coord; coord1 = {0.38, 0.1}; specify2 = coord; coord2 = {0, 0.1}
    fin: Finalize "Form Union"

Materials
  mat1: Common "Air" on domains 1-41
    def "Basic"
      thermalexpansioncoefficient = alpha_p(pA,T)
      molarmass = 0.02897[kg/mol]
      bulkviscosity = muB(T)
      relpermeability = 1
      relpermittivity = 1
      dynamicviscosity = eta(T)
      ratioofspecificheat = 1.4
      electricconductivity = 0[S/m]
      heatcapacity = Cp(T)
      density = rho(pA,T)
      thermalconductivity = k(T)
      soundspeed = cs(T)
      eta: Piecewise | arg = T; pieces = {200.0, 1600.0, -8.38278E-7+8.35717342E-8*T^1-7.69429583E-11*T^2+4.6437266E-14*T^3-1.06585607E-17*T^4}; argunit = K; fununit = Pa*s
      Cp: Piecewise | arg = T; pieces = {200.0, 1600.0, 1047.63657-0.372589265*T^1+9.45304214E-4*T^2-6.02409443E-7*T^3+1.2858961E-10*T^4}; argunit = K; fununit = J/(kg*K)
      rho: Analytic | expr = pA*0.02897/R_const[K*mol/J]/T; args = {pA, T}; fununit = kg/m^3; argunit = {Pa, K}
      k: Piecewise | arg = T; pieces = {200.0, 1600.0, -0.00227583562+1.15480022E-4*T^1-7.90252856E-8*T^2+4.11702505E-11*T^3-7.43864331E-15*T^4}; argunit = K; fununit = W/(m*K)
      cs: Analytic | expr = sqrt(1.4*R_const[K*mol/J]/0.02897*T); args = T; fununit = m/s; argunit = K
      an1: Analytic | funcname = alpha_p; expr = -1/rho(pA,T)*d(rho(pA,T),T); args = {pA, T}; fununit = 1/K; argunit = {Pa, K}
      an2: Analytic "Analytic 2a" | funcname = muB; expr = 0.6*eta(T); args = T; fununit = Pa*s; argunit = K
    RefractiveIndex
      n = 1
      ki = 0
    NonlinearModel
      BA = def.gamma-1
    idealGas
      Rs = R_const/Mn
      heatcapacity = Cp(T)
      ratioofspecificheat = 1.4
      molarmass = 0.02897[kg/mol]
      Cp: Piecewise | arg = T; pieces = {200.0, 1600.0, 1047.63657-0.372589265*T^1+9.45304214E-4*T^2-6.02409443E-7*T^3+1.2858961E-10*T^4}; argunit = K; fununit = J/(kg*K)
  mat2: Common "Copper" on domains 2-41
    def "Basic"
      relpermeability = 1
      electricconductivity = 5.998e7[S/m]
      thermalexpansioncoefficient = 17e-6[1/K]
      heatcapacity = 385[J/(kg*K)]
      relpermittivity = 1
      density = 8960[kg/m^3]
      thermalconductivity = 400[W/(m*K)]
    Enu "Young's modulus and Poisson's ratio"
      E = 110[GPa]
      nu = 0.35
    linzRes "Linearized resistivity"
      rho0 = 1.72e-8[ohm*m]
      alpha = 0.0039[1/K]
      Tref = 298[K]

Physics
  mf: InductionCurrents "Magnetic Fields" on all domains
    dependent variable A = {Ax, Ay, Az}
    fsp1: FreeSpace (default)
    mi1: MagneticInsulation (default)
    init1: init "Initial Values 1" (default)
    scu1: SurfaceCurrent "Surface Current Density 1" (disabled) on boundaries 6, 7, 10, 11, 14, 15, 18, 19, 22, 23, 26, 27, 30, 31, 34, 35, 38, 39, 42, 43, 46, 47, 50, 51, 54, 55, 58, 59, 62, 63, 66, 67, 70, 71, 74, 75, 78, 79, 82, 83, 86, 87, 90, 91, 94, 95, 98, 99, 102, 103, 106, 107, 110, 111, 114, 115, 118, 119, 122, 123, 126, 127, 130, 131, 134, 135, 138, 139, 142, 143, 146, 147, 150, 151, 154, 155, 158, 159, 162, 163
      Js0 = {0, 0, -9994.93}
    scu2: SurfaceCurrent "Surface Current Density 2" (disabled) on boundaries 8, 9, 12, 13, 16, 17, 20, 21, 24, 25, 28, 29, 32, 33, 36, 37, 40, 41, 44, 45, 48, 49, 52, 53, 56, 57, 60, 61, 64, 65, 68, 69, 72, 73, 76, 77, 80, 81, 84, 85, 88, 89, 92, 93, 96, 97, 100, 101, 104, 105, 108, 109, 112, 113, 116, 117, 120, 121, 124, 125, 128, 129, 132, 133, 136, 137, 140, 141, 144, 145, 148, 149, 152, 153, 156, 157, 160, 161, 164, 165
      Js0 = {0, 0, 9994.93}
    ecd1: ExternalCurrentDensity on domains 3, 5, 7, 9, 11, 13, 15, 17, 19, 21, 23, 25, 27, 29, 31, 33, 35, 37, 39, 41
      Je = {0, 0, 9994.93}
    ecd2: ExternalCurrentDensity on domains 2, 4, 6, 8, 10, 12, 14, 16, 18, 20, 22, 24, 26, 28, 30, 32, 34, 36, 38, 40
      Je = {0, 0, -9994.93}

Mesh
  mesh1 "Mesh 1" (physics-controlled)

Studies
  std1 "Study 1"
    stat: Stationary

Solver configurations
  sol1 "Solution 1" (study std1)
    v1: Variables "Dependent Variables 1"
    s1: Stationary "Stationary Solver 1"
      dDef: Direct
      fc1: FullyCoupled | linsolver = dDef

Datasets
  dset1: Solution | solution = sol1

Derived values
  gev1: EvalGlobal "Global Evaluation 1" | data = dset1

Plots
  pg1: PlotGroup2D "Magnetic Flux Density Norm (mf)" | data = dset1
    surf1: Surface | expr = mf.normB
    str1: Streamline on boundaries 1-165 | expr = {mf.Bx, mf.By}; udist = 0.03
      col1: Color "Color Expression 1" | expr = mf.normB
      filt1: Filter | expr = !isScalingSystemDomain
    con1: Contour | expr = mf.Az; levelrounding = off
      filt1: Filter | expr = !isScalingSystemDomain
  pg2: PlotGroup2D "2D Plot Group 2" | data = dset1
    str1: Streamline on boundaries 6-165 | expr = {mf.Bx, mf.By}; pointtype = arrow
  pg3: PlotGroup1D "1D Plot Group 3" | data = dset1
    lngr1: LineGraph on boundaries 4 | expr = mf.normB