// COMSOL Multiphysics 6.2.0.415 model "Lab 9.mph"
// Outline of the model tree

Parameters
  W = 60  // Width of Ra
  H = 140  // height of RA
  b = 25  // thickness
  coilW = 10  // coil width
  coilH = 40  // coil Height
  coilS = 2  // coil spacing
  gap = 3  // air gap
  curr = 1.5[A]  // current

Geometry
  geom1 "Geometry 1" (2D, length unit mm)
    r1: Rectangle | size = {W, H}
    r2: Rectangle | pos = {0, b}; size = {W-b, H-2*b}
    dif1: Difference | input = r1; input2 = r2
    r3: Rectangle | pos = {-b-gap, 0}; size = {b, H}
    r4: Rectangle | pos = {W-b-coilW-coilS, (H-coilH)/2}; size = {coilW, coilH}
    r5: Rectangle | pos = {W+coilS, (H-coilH)/2}; size = {coilW, coilH}
    r6: Rectangle "Air" | pos = {-3*W, -3*W}; size = {W*6.5, W*8}
    fin: Finalize "Form Union"

Materials
  mat1: Common "Air" on domains 1
    def "Basic"
      thermalexpansioncoefficient = alpha_p(pA,T)
      molarmass = 0.02897[kg/mol]
      bulkviscosity = muB(T)
      relpermeability = 1
      relpermittivity = 1
      dynamicviscosity = eta(T)
      ratioofspecificheat = 1.4
      electricconductivity = 0[S/m]
      heatcapacity = Cp(T)
      density = rho(pA,T)
      thermalconductivity = k(T)
      soundspeed = cs(T)
      eta: Piecewise | arg = T; pieces = {200.0, 1600.0, -8.38278E-7+8.35717342E-8*T^1-7.69429583E-11*T^2+4.6437266E-14*T^3-1.06585607E-17*T^4}; argunit = K; fununit = Pa*s
      Cp: Piecewise | arg = T; pieces = {200.0, 1600.0, 1047.63657-0.372589265*T^1+9.45304214E-4*T^2-6.02409443E-7*T^3+1.2858961E-10*T^4}; argunit = K; fununit = J/(kg*K)
      rho: Analytic | expr = pA*0.02897/R_const[K*mol/J]/T; args = {pA, T}; fununit = kg/m^3; argunit = {Pa, K}
      k: Piecewise | arg = T; pieces = {200.0, 1600.0, -0.00227583562+1.15480022E-4*T^1-7.90252856E-8*T^2+4.11702505E-11*T^3-7.43864331E-15*T^4}; argunit = K; fununit = W/(m*K)
      cs: Analytic | expr = sqrt(1.4*R_const[K*mol/J]/0.02897*T); args = T; fununit = m/s; argunit = K
      an1: Analytic | funcname = alpha_p; expr = -1/rho(pA,T)*d(rho(pA,T),T); args = {pA, T}; fununit = 1/K; argunit = {Pa, K}
      an2: Analytic "Analytic 2a" | funcname = muB; expr = 0.6*eta(T); args = T; fununit = Pa*s; argunit = K
    RefractiveIndex
      n = 1
      ki = 0
    NonlinearModel
      BA = def.gamma-1
    idealGas
      Rs = R_const/Mn
      heatcapacity = Cp(T)
      ratioofspecificheat = 1.4
      molarmass = 0.02897[kg/mol]
      Cp: Piecewise | arg = T; pieces = {200.0, 1600.0, 1047.63657-0.372589265*T^1+9.45304214E-4*T^2-6.02409443E-7*T^3+1.2858961E-10*T^4}; argunit = K; fununit = J/(kg*K)
  mat2: Common "Soft Iron (Without Losses)" on domains 2, 3
    def "Basic"
      electricconductivity = 0[S/m]
      relpermittivity = 1
    BHCurve
      normB = BH(normHin)
      normH = BH_inv(normBin)
      Wpm = BH_prim(normHin)
      normHin = sqrt(H1^2+H2^2+H3^2+eps)
      DESCR_PREFIX:normHin = Magnetic field norm
      normBin = sqrt(B1^2+B2^2+B3^2+eps)
      DESCR_PREFIX:normBin = Magnetic flux density norm
      BH: Interpolation
        table = 
          {0, 0}
          {663.146, 1}
          {1067.5, 1.1}
          {1705.23, 1.2}
          {2463.11, 1.3}
          {3841.67, 1.4}
          {5425.74, 1.5}
          {7957.75, 1.6}
          {12298.3, 1.7}
          {20462.8, 1.8}
          {32169.6, 1.9}
          {61213.4, 2}
          {111408, 2.1}
          {188487.757, 2.2}
          {267930.364, 2.3}
          {347507.836, 2.4}
        extrap = linear
        fununit = T
        argunit = A/m
        defineinv = on
        defineprimfun = on
    EffectiveBHCurve
      normBeff = BHeff(normHeffin)
      normHeff = BHeff_inv(normBeffin)
      normHeffin = sqrt(realdot(H1,H1)+realdot(H2,H2)+realdot(H3,H3)+eps)
      DESCR_PREFIX:normHeffin = Effective magnetic field norm
      normBeffin = sqrt(realdot(B1,B1)+realdot(B2,B2)+realdot(B3,B3)+eps)
      DESCR_PREFIX:normBeffin = Effective magnetic flux density norm
      BHeff: Interpolation
        table = 
          {0, 0}
          {663.146, 1.00000005169}
          {1067.5, 1.49364951241}
          {1705.23, 1.94153284613}
          {2463.11, 2.25776566937}
          {3841.67, 2.60998064243}
          {5425.74, 2.86644520908}
          {7957.75, 3.14414380972}
          {12298.3, 3.44853805165}
          {20462.8, 3.78167119737}
          {32169.6, 4.05834559011}
          {61213.4, 4.42064655295}
          {111408, 4.72127408955}
          {188487.757, 4.97214814072}
          {267930.364, 5.14551086086}
          {347507.836, 5.24551086143}
        extrap = linear
        fununit = T
        argunit = A/m
        defineinv = on
  mat3: Common "Copper" on domains 4, 5
    def "Basic"
      relpermeability = 1
      electricconductivity = 5.998e7[S/m]
      thermalexpansioncoefficient = 17e-6[1/K]
      heatcapacity = 385[J/(kg*K)]
      relpermittivity = 1
      density = 8960[kg/m^3]
      thermalconductivity = 400[W/(m*K)]
    Enu "Young's modulus and Poisson's ratio"
      E = 110[GPa]
      nu = 0.35
    linzRes "Linearized resistivity"
      rho0 = 1.72e-8[ohm*m]
      alpha = 0.0039[1/K]
      Tref = 298[K]

Physics
  mf: InductionCurrents "Magnetic Fields" on all domains
    dependent variable A = {Ax, Ay, Az}
    d.d = b
    fsp1: FreeSpace (default)
    mi1: MagneticInsulation (default)
    init1: init "Initial Values 1" (default)
    alf1: AmperesLawFluid "Ampère's Law in Fluids 1" on domains 1
    als1: AmperesLawSolid "Ampère's Law in Solids 1" on domains 2, 3 | ConstitutiveRelationBH = BHCurve
    coil1: Coil on domains 4 | ConductorModel = Multi; ICoil = curr; N = 500; materialType = solid
    coil2: Coil on domains 5 | ConductorModel = Multi; ICoil = -curr; N = 500; materialType = solid
    fcal1: ForceCalculation on domains 2

Mesh
  mesh1 "Mesh 1" (physics-controlled)

Studies
  std1 "Study 1"
    param: Parametric "Parametric Sweep" | pname = gap; plistarr = range(1,1,5)
    stat: Stationary

Solver configurations
  sol1 "Solution 1" (study std1)
    v1: Variables "Dependent Variables 1"
    s1: Stationary "Stationary Solver 1"
      dDef: Direct
      fc1: FullyCoupled | linsolver = dDef; maxiter = 100; jtech = once
  sol2 "Parametric Solutions 1" (study std1)
  sol6 "Parametric Solutions 2" (study std1)

Datasets
  dset1: Solution | solution = sol1
  dset2: Solution | solution = sol2
  dset3: Solution | solution = sol6

Plots
  pg1: PlotGroup2D "Magnetic Flux Density Norm (mf)" | data = dset1
    surf1: Surface | expr = mf.normB
    str1: Streamline on boundaries 1-24 | expr = {mf.Bx, mf.By}; udist = 0.03
      col1: Color "Color Expression 1" | expr = mf.normB
      filt1: Filter | expr = !isScalingSystemDomain
    con1: Contour | expr = mf.Az; levelrounding = off
      filt1: Filter | expr = !isScalingSystemDomain
  pg2: PlotGroup1D "1D Plot Group 2" | data = dset1
    glob1: Global | data = dset1; expr = mf.Forcex_0; unit = N; descr = Electromagnetic force, x-component
    glob2: Global | data = dset2; expr = mf.Forcex_0; unit = N; descr = Electromagnetic force, x-component
    glob3: Global | data = dset3; expr = mf.Forcex_0; unit = N; descr = Electromagnetic force, x-component
    glob4: Global | data = dset3; expr = mf.Forcex_0; unit = N; descr = Electromagnetic force, x-component
  pg3: PlotGroup2D "Magnetic Flux Density Norm (mf) 1" | data = dset2
    surf1: Surface | expr = mf.normB
    str1: Streamline on boundaries 1-24 | expr = {mf.Bx, mf.By}; udist = 0.03
      col1: Color "Color Expression 1" | expr = mf.normB
      filt1: Filter | expr = !isScalingSystemDomain
    con1: Contour | expr = mf.Az; levelrounding = off
      filt1: Filter | expr = !isScalingSystemDomain
  pg4: PlotGroup2D "Magnetic Flux Density Norm (mf) 2" | data = dset3
    surf1: Surface | expr = mf.normB
    str1: Streamline on boundaries 1-24 | expr = {mf.Bx, mf.By}; udist = 0.03
      col1: Color "Color Expression 1" | expr = mf.normB
      filt1: Filter | expr = !isScalingSystemDomain
    con1: Contour | expr = mf.Az; levelrounding = off
      filt1: Filter | expr = !isScalingSystemDomain
  pg5: PlotGroup1D "1D Plot Group 5" (disabled) | data = dset1

Exports
  anim1: Animation | target = player
  anim2: Animation | giffilename = C:\Users\Doria\Documents\COMSOL\Magnetic Flux gif.gif
  anim3: Animation (disabled) | target = player; maxframes = 17
  anim4: Animation (disabled) | target = player
  anim5: Animation | target = player; frametime = 0.5
  anim6: Animation (disabled) | target = player
  anim7: Animation | giffilename = C:\Users\Doria\Documents\COMSOL\Mag Flux distance change gif.gif
  anim8: Animation | target = player
  anim9: Animation | target = player
  anim10: Animation