// COMSOL Multiphysics 6.2.0.415 model "Lab_4 Dielectric Shielding.mph"
// Outline of the model tree

Parameters
  er_a = 20  // Relative permittivity, free space
  er_b = 30  // Relative permittivity, dielectric
  V0 = 1[V]  // Applied voltage
  er_c = 1

Selections
  sel1: Explicit "full fidelity" on domains 4-7
  sel2: Explicit "Dielectric Shielding" on boundaries 41-44
  sel3: Explicit "Model Domain" on domains 1, 4-8, 11, 12

Geometry
  geom1 "Geometry 1" (2D, length unit cm)
    r1: Rectangle | pos = {0.1, -5}; size = {8, 10}
    r2: Rectangle | pos = {0.1, 2}; size = {3.5, 1}
    fil1: Fillet | point = r2(1) points 2, 3; radius = 0.5
    copy1: Copy | input = fil1; keep = on; displx = 0; disply = -5
    mir1: Mirror | input = copy1, fil1, r1; keep = on; axis = {1, 0}
    c1: Circle (disabled) | pos = {0.1, 0}; rot = -90; r = 0.95; angle = 180
    c2: Circle (disabled) | pos = {-0.1, 0}; rot = 90; layername = Layer 1; layer = 1 [mm]; angle = 180
    c3: Circle | pos = {-2, 0}; rot = 90; layername = Layer 1; layer = 0.05; r = 0.7
    c4: Circle | pos = {2, 0}; rot = 90; r = 0.8
    fin: Finalize "Form Union"

Materials
  mat1: Common "Material 1" on selection sel3
    def "Basic"
      relpermittivity = er_c
  mat2: Common "Material 2" on selection sel1
    def "Basic"
      relpermittivity = er_a
  mat3: Common "Material 3" on selection sel2
    def "Basic"
      relpermittivity = er_b

Physics
  es: Electrostatics on selection sel3
    dependent variable V
    ccn1: ChargeConservation (default)
    zc1: ZeroCharge (default)
    init1: init "Initial Values 1" (default)
    gnd1: Ground on boundaries 20, 22, 45, 46
    gnd2: Ground on boundaries 4, 5, 29, 30
    term1: Terminal on boundaries 24, 26, 47, 48 | TerminalType = Voltage; V0 = V0
    term2: Terminal on boundaries 6, 7, 31, 32 | TerminalType = Voltage; V0 = V0
    des1: DielectricShielding on selection sel2 | ds = 1[mm]
    symp1: SymmetryPlane on boundaries 12, 14, 16, 17, 21, 25

Mesh
  mesh1 "Mesh 1" (physics-controlled)

Studies
  std1 "Study 1"
    stat: Stationary

Solver configurations
  sol1 "Solution 1" (study std1)
    v1: Variables "Dependent Variables 1"
    s1: Stationary "Stationary Solver 1"
      dDef: Direct
      fc1: FullyCoupled | linsolver = dDef

Datasets
  dset1: Solution | solution = sol1

Derived values
  gev1: EvalGlobal "Global Evaluation 1" | data = dset1; table = tbl1; expr = {es.Q0_1/V0, es.Q0_2/V0}

Tables
  tbl1: Table
    // Global Evaluation 1
    es.Q0_1/V0 (F) | es.Q0_2/V0 (F)
    1.35118e-11 | 1.27297e-11
  tbl2: Table
    // Global Evaluation 2
    es.Q0_2/V0 (F)
    1.30047e-11

Plots
  pg1: PlotGroup2D "Electric Field (es)" | data = dset1
    surf1: Surface | expr = es.normE; descr = Electric field norm
    con1: Contour | expr = V
      col1: Color "Color Expression 1" | expr = es.normE; descr = Electric field norm
    str1: Streamline on boundaries 6, 24, 31, 32, 47, 48 | expr = {es.Ex, es.Ey}; selnumber = 40
      col1: Color "Color Expression 1" | expr = es.normE; descr = Electric field norm