// COMSOL Multiphysics 6.2.0.415 model "Lab_6_Hezmolt Coil_Working.mph"
// Outline of the model tree

Parameters
  I0 = 0.25[mA]  // Coil Current

Selections
  sel1: Explicit "Coils" on boundaries adjacent to domains 6, 7

Coordinate systems
  ie1: InfiniteElement "Infinite Element Domain 1" on domains 1-4, 8-11 | ScalingType = Spherical

Geometry
  geom1 "Geometry 1" (3D, length unit m)
    wp1: WorkPlane | unite = on
      sq1: Square | pos = {-0.4, -0.2}; base = center; size = 0.05
      sq2: Square | pos = {-0.4, 0.2}; base = center; size = 0.05
    rev1: Revolve | workplane = wp1; input = wp1; angtype = full
    sph1: Sphere | layername = Layer 1; layer = 0.3; r = 1.3
    ls1: LineSegment | vertex1 = sph1(1) points 4; vertex2 = sph1(1) points 9
    fin: Finalize "Form Union"

Materials
  mat1: Common "Air" on all domains
    def "Basic"
      thermalexpansioncoefficient = alpha_p(pA,T)
      molarmass = 0.02897[kg/mol]
      bulkviscosity = muB(T)
      relpermeability = 1
      relpermittivity = 1
      dynamicviscosity = eta(T)
      ratioofspecificheat = 1.4
      electricconductivity = 0[S/m]
      heatcapacity = Cp(T)
      density = rho(pA,T)
      thermalconductivity = k(T)
      soundspeed = cs(T)
      eta: Piecewise | arg = T; pieces = {200.0, 1600.0, -8.38278E-7+8.35717342E-8*T^1-7.69429583E-11*T^2+4.6437266E-14*T^3-1.06585607E-17*T^4}; argunit = K; fununit = Pa*s
      Cp: Piecewise | arg = T; pieces = {200.0, 1600.0, 1047.63657-0.372589265*T^1+9.45304214E-4*T^2-6.02409443E-7*T^3+1.2858961E-10*T^4}; argunit = K; fununit = J/(kg*K)
      rho: Analytic | expr = pA*0.02897/R_const[K*mol/J]/T; args = {pA, T}; fununit = kg/m^3; argunit = {Pa, K}
      k: Piecewise | arg = T; pieces = {200.0, 1600.0, -0.00227583562+1.15480022E-4*T^1-7.90252856E-8*T^2+4.11702505E-11*T^3-7.43864331E-15*T^4}; argunit = K; fununit = W/(m*K)
      cs: Analytic | expr = sqrt(1.4*R_const[K*mol/J]/0.02897*T); args = T; fununit = m/s; argunit = K
      an1: Analytic | funcname = alpha_p; expr = -1/rho(pA,T)*d(rho(pA,T),T); args = {pA, T}; fununit = 1/K; argunit = {Pa, K}
      an2: Analytic "Analytic 2a" | funcname = muB; expr = 0.6*eta(T); args = T; fununit = Pa*s; argunit = K
    RefractiveIndex
      n = 1
      ki = 0
    NonlinearModel
      BA = def.gamma-1
    idealGas
      Rs = R_const/Mn
      heatcapacity = Cp(T)
      ratioofspecificheat = 1.4
      molarmass = 0.02897[kg/mol]
      Cp: Piecewise | arg = T; pieces = {200.0, 1600.0, 1047.63657-0.372589265*T^1+9.45304214E-4*T^2-6.02409443E-7*T^3+1.2858961E-10*T^4}; argunit = K; fununit = J/(kg*K)
  mat2: Common "Coil Insulator" on domains 6, 7
    def "Basic"
      relpermeability = 1
      electricconductivity = 6e7
      relpermittivity = 1

Physics
  mf: InductionCurrents "Magnetic Fields" on all domains
    dependent variable A = {Ax, Ay, Az}
    fsp1: FreeSpace (default)
    mi1: MagneticInsulation (default)
    init1: init "Initial Values 1" (default)
    coil1: Coil on domains 6 | ConductorModel = Multi; CoilType = Circular; ICoil = I0
      cre1: CoilReferenceEdge "Coil Geometry 1" on edges 25, 26, 46, 49 | OverrideLength = 0
    coil2: Coil on domains 7 | ConductorModel = Multi; CoilType = Circular; ICoil = I0
      cre1: CoilReferenceEdge "Coil Geometry 1" on edges 30, 31, 72, 75
  mfco: MagneticFieldsCurrentsOnly on all domains
    dependent variable A2 = {A2x, A2y, A2z}
    free1: FreeSpace (default)
    ext1: ExteriorBoundaries (default)
    init1: init "Initial Values 1" (default)
    cond1: Conductor on domains 6
      term1: Terminal on boundaries 13 | I0 = 10*I0
    cond2: Conductor on domains 7
      term1: Terminal on boundaries 20 | I0 = 10*I0

Mesh
  mesh1 "Mesh 1" (physics-controlled)

Studies
  std1 "Study 1"
    stat: Stationary | solve for = {mf}
    stat1: Stationary | solve for = {mfco}

Solver configurations
  sol1 "Solution 1" (study std1)
    v1: Variables "Dependent Variables 1"
    s1: Stationary "Stationary Solver 1"
      fc1: FullyCoupled | linsolver = i1
      i1: Iterative | linsolver = fgmres; nlinnormuse = on
        mg1: Multigrid
    su1: StoreSolution "Solution Store 1"
    v2: Variables "Dependent Variables 2" | initmethod = sol; notsolmethod = sol
    s2: Stationary "Stationary Solver 2"
      dDef: Direct
      se1: Segregated
        ss1: SegregatedStep "Magnetic Fields, Currents Only" | segvar = {comp1_A2}; linsolver = dDef
        ss2: SegregatedStep "Conductor Electric Potential ( Mfco )"
          segvar = {comp1_mfco_cond1_Vdc, comp1_mfco_cond1_Vdc0, comp1_mfco_cond2_Vdc, comp1_mfco_cond2_Vdc0}
          linsolver = dDef
  sol2 "Solution Store 1" (study std1)

Datasets
  dset1: Solution on selection sel1 | solution = sol1
  dset2: Solution | solution = sol2

Plots
  pg1: PlotGroup3D "Magnetic Flux Density, MF" | data = dset1
    slc1: Slice | expr = mf.normB; descr = Magnetic flux density norm; quickplane = xy; quickznumber = 1
    arwv1: ArrowVolume | expr = {mf.Hx, mf.Hy, mf.Hz}; descr = Magnetic field; xnumber = 24; ynumber = 10; znumber = 1
    surf1: Surface | expr = 1
  pg2: PlotGroup1D "Comparison of By" | data = dset1
    lngr1: LineGraph on edges 40 | expr = mf.By; xdata = expr; xdataexpr = y; legends = Magnetic Fields interface
    lngr2: LineGraph on edges 40
      expr = mfco.By
      xdata = expr
      xdataexpr = y
      legends = Magnetic Fields, Currents Only interface
  pg3: PlotGroup1D "Comparison of Byy" | data = dset1
    lngr1: LineGraph on edges 40
      expr = d(laginterp(2,mf.By),y)
      xdata = expr
      xdataexpr = y
      legends = Magnetic Fields interface
    lngr2: LineGraph on edges 40
      expr = d(mfco.By,y)
      xdata = expr
      xdataexpr = y
      legends = Magnetic Fields, Currents Only interface
  pg4: PlotGroup3D "3D Plot Group 4" | data = dset1
    str1: Streamline | expr = {mf.Bx, mf.By, mf.Bz}; mdist = {0.05, 0.1}; pointtype = arrow
  pg5: PlotGroup1D "1D Plot Group 5" | data = dset1
    lngr1: LineGraph on edges 40 | expr = mf.normB