// COMSOL Multiphysics 6.2.0.415 model "Permanent Magnet.mph"
// Outline of the model tree

Geometry
  geom1 "Geometry 1" (2D, length unit m)
    r1: Rectangle | size = {2, 1}
    c1: Circle | pos = {1, 0.5}; r = 2
    fin: Finalize "Form Union"

Materials
  mat1: Common "Air" on all domains
    def "Basic"
      thermalexpansioncoefficient = alpha_p(pA,T)
      molarmass = 0.02897[kg/mol]
      bulkviscosity = muB(T)
      relpermeability = 1
      relpermittivity = 1
      dynamicviscosity = eta(T)
      ratioofspecificheat = 1.4
      electricconductivity = 0[S/m]
      heatcapacity = Cp(T)
      density = rho(pA,T)
      thermalconductivity = k(T)
      soundspeed = cs(T)
      eta: Piecewise | arg = T; pieces = {200.0, 1600.0, -8.38278E-7+8.35717342E-8*T^1-7.69429583E-11*T^2+4.6437266E-14*T^3-1.06585607E-17*T^4}; argunit = K; fununit = Pa*s
      Cp: Piecewise | arg = T; pieces = {200.0, 1600.0, 1047.63657-0.372589265*T^1+9.45304214E-4*T^2-6.02409443E-7*T^3+1.2858961E-10*T^4}; argunit = K; fununit = J/(kg*K)
      rho: Analytic | expr = pA*0.02897/R_const[K*mol/J]/T; args = {pA, T}; fununit = kg/m^3; argunit = {Pa, K}
      k: Piecewise | arg = T; pieces = {200.0, 1600.0, -0.00227583562+1.15480022E-4*T^1-7.90252856E-8*T^2+4.11702505E-11*T^3-7.43864331E-15*T^4}; argunit = K; fununit = W/(m*K)
      cs: Analytic | expr = sqrt(1.4*R_const[K*mol/J]/0.02897*T); args = T; fununit = m/s; argunit = K
      an1: Analytic | funcname = alpha_p; expr = -1/rho(pA,T)*d(rho(pA,T),T); args = {pA, T}; fununit = 1/K; argunit = {Pa, K}
      an2: Analytic "Analytic 2a" | funcname = muB; expr = 0.6*eta(T); args = T; fununit = Pa*s; argunit = K
    RefractiveIndex
      n = 1
      ki = 0
    NonlinearModel
      BA = def.gamma-1
    idealGas
      Rs = R_const/Mn
      heatcapacity = Cp(T)
      ratioofspecificheat = 1.4
      molarmass = 0.02897[kg/mol]
      Cp: Piecewise | arg = T; pieces = {200.0, 1600.0, 1047.63657-0.372589265*T^1+9.45304214E-4*T^2-6.02409443E-7*T^3+1.2858961E-10*T^4}; argunit = K; fununit = J/(kg*K)
  mat2: Common "BMN-38" on domains 2
    def "Basic"
      thermalconductivity = 9.0[W/(m*K)]
      density = 7.55[g/cm^3]
      heatcapacity = 440[J/(kg*K)]
      electricconductivity = 1/1.50[uohm*m]
      relpermittivity = 1
    RemanentFluxDensity
      murec = 1.05
      normBr = Br(T)
      int1: Interpolation | funcname = Br; table = {{293.15, 1.260}, {353.15, 1.17}}; extrap = linear; fununit = T; argunit = K

Physics
  mf: InductionCurrents "Magnetic Fields" on all domains
    dependent variable A = {Ax, Ay, Az}
    fsp1: FreeSpace (default)
    mi1: MagneticInsulation (default)
    init1: init "Initial Values 1" (default)
    mag1: Magnet on domains 2
      north1: North on boundaries 1
      south1: South on boundaries 4

Mesh
  mesh1 "Mesh 1" (physics-controlled)

Studies
  std1 "Study 1"
    stat: Stationary

Solver configurations
  sol1 "Solution 1" (study std1)
    v1: Variables "Dependent Variables 1"
    s1: Stationary "Stationary Solver 1"
      dDef: Direct
      fc1: FullyCoupled | linsolver = dDef

Datasets
  dset1: Solution | solution = sol1

Plots
  pg1: PlotGroup2D "Magnetic Flux Density Norm (mf)" | data = dset1
    surf1: Surface | expr = mf.normB
    str1: Streamline on boundaries 1-8 | expr = {mf.Bx, mf.By}; udist = 0.03
      col1: Color "Color Expression 1" | expr = mf.normB
      filt1: Filter | expr = !isScalingSystemDomain
    con1: Contour | expr = mf.Az; levelrounding = off
      filt1: Filter | expr = !isScalingSystemDomain